#uniaxial tensile test of graphene

##---------------INITIALIZATION-------------------------------

units          real
dimension 	    3
boundary       p p f
atom_style 	full
newton 		on


##---------------FORCE FIELDS---------------------------------

bond_style      harmonic

angle_style     harmonic

dihedral_style  charmm

improper_style  cvff

pair_style lj/cut 10


##---------------ATOM DEFINITION------------------------------

read_data	graphene.data


##---------------SETTINGS-------------------------------------

timestep 	0.5
variable   ts equal 0.5


##---------------COMPUTES-------------------------------------

compute 	1 all stress/atom NULL
compute    2 all reduce sum c_1[1] c_1[2]


variable   Lx equal lx
variable   Ly equal ly
variable   Lz equal lz
variable   Vol equal vol
variable   thickn equal 3.4
fix		1 all npt temp 300 300 50 x 1 1 500 y 1 1 500
thermo 	2000
##---------------RELAXATION--------------------------------------

run            50000


##---------------DEFORMATION--------------------------------------
unfix              1
reset_timestep     0
fix		1 all npt temp 300 300 50 x 1 1 500
fix        2 all ave/time 1 100 100 c_2[1] c_2[2]
fix        3 all ave/time 1 100 100 v_Lx v_Ly v_Lz v_Vol
variable   srate equal 1.0e9
variable   srate1 equal "v_srate / 1.0e15"
fix		4 all deform 1 y erate ${srate1} units box remap x
run            100
##---------------THERMO-OUTPUTS--------------------------------------
variable   CorVol equal f_3[4]*v_thickn/(f_3[3])
variable   ConvoFac equal 1/1.01325e4
variable   sigmaxx equal f_2[1]*v_ConvoFac/v_CorVol
variable   sigmayy equal f_2[2]*v_ConvoFac/v_CorVol
variable   StrainPerTs equal v_srate1*v_ts
variable   strain equal v_StrainPerTs*step
thermo 	100
thermo_style custom step temp v_strain v_sigmaxx v_sigmayy pe ke lx ly vol


##---------------DEFORMATION--------------------------------------
dump           1 all atom 5000 tensile_test.lammpstrj
run            500000
